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/batch
! ANSYS input file written by Workbench version 2021 R1
! File used for geometry attach: C:\Users\Shivu\Desktop\SMA_Nonlinear_files\dp0\SYS-1\DM\SYS-1.scdoc
/title,SMA_Nonlinear--Static Structural (A5)
/com,--- Data in consistent MKS units. See Solving Units in the help system for more information.
/units,MKS
/prep7
! Turn off shape checking because checks already performed inside WB mesher.
! See help system for more information.
SHPP,OFF,,NOWARN
etcon,set             ! allow ANSYS to choose best KEYOP's for 180x elements, resets any applicable keyopt to MAPDL defaults
/com,*********** Nodes for the whole assembly ***********
nblock,3,,1226
(1i9,3e20.9e3)
        1     2.940741211E-02    -5.000000000E-04     1.000000000E-03
        2     2.886542016E-02    -5.000000000E-04     1.000000000E-03
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-1
/com,*********** Elements for Body 1 "Bottom" ***********
et,1,186
keyo,1,2,1          ! set full integration on SOLID186
eblock,19,solid,,58
(19i9)
        1        1        1        1        0        0        0        0       20        0        1        1      118      117       58      182      239      180      181
      357      702      527      356      833      829      828      831      358      706      704      528
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-1
/com,*********** Elements for Body 2 "Top" ***********
et,2,186
keyo,2,2,1          ! set full integration on SOLID186
eblock,19,solid,,58
(19i9)
        2        2        1        2        0        0        0        0       20        0       59      117      118      119      176      180      239      298      297
      702      705      708      703      829      946     1059      830      704      706      709      822
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-1
/com,*********** Send User Defined Coordinate System(s) ***********
csys,0
toffst,273.15,  ! Temperature offset from absolute zero
/com,*********** Set Reference Temperature ***********
tref,0.
/com,*********** Send Materials ***********
MP,CTEX,1,-0.0001,	! C^-1
MP,CTEY,1,0,	! C^-1
MP,CTEZ,1,0,	! C^-1
MP,EX,1,67000000000,	! Pa
MP,NUXY,1,0.33,
MP,DENS,1,6450,	! kg m^-3

TB,SMA,1,1,,SUPE
TBDATA,1,100000000,170000000,239000000,170000000,0.067,0

Temperature = 'TEMP' ! Temperature
MP,DENS,2,7850,	! kg m^-3
MP,ALPX,2,1.2e-05,	! C^-1
MP,C,2,434,	! J kg^-1 C^-1
MP,KXX,2,60.5,	! W m^-1 C^-1
MP,RSVX,2,1.7e-07,	! kg m^3 A^-2 s^-3
MP,EX,2,200000000000,	! Pa
MP,NUXY,2,0.3,
MP,MURX,2,10000,

!************************* Model Summary ********************
!Bottom,	Nitinol,	matid,	1
!Top,	Structural Steel,	matid,	2
!************************* End Model Summary ********************
/com,*********** Fixed Supports ***********
CMBLOCK,_FIXEDSU,NODE,       13
(8i10)
        59        60       177       178       179       296       529       530
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cmsel,s,_FIXEDSU
d,all,all
nsel,all
/com,*********** Define Body Force Temperature ***********
esel,none
esel,a,type,,1
cm,_CM110,elem
esel,all
fini
/com,****************************************************************************
/com,*************************    SOLUTION       ********************************
/com,****************************************************************************
/solu
antype,0                   ! static analysis
nlgeom,on                  ! Turn on Large Deformation Effects
_thickRatio=  0     ! Ratio of thick parts in the model
eqsl,sparse,,,,,1
cntr,print,1               ! print out contact info and also make no initial contact an error
dmpoption,emat,no             ! Don't combine emat file for DANSYS
dmpoption,esav,no             ! Don't combine esav file for DANSYS
nldiag,cont,iter           ! print out contact info each equilibrium iteration
rescontrol,define,last,last,,dele	   ! Program Controlled
/com,****************************************************
/com,******************* SOLVE FOR LS 1 OF 1 ****************
cmsel,s,_CM110
nsle
bf,all,temp,100.
nsel,all
esel,all
autots,on                   ! User turned on automatic time stepping
nsub,10,1000,10,OFF
time,1.
outres,erase
outres,all,none
outres,nsol,all,
outres,rsol,all
outres,eangl,all
outres,etmp,all
outres,veng,all
outres,strs,all,
outres,srfs,all,
outres,bkstr,all,
outres,epel,all,
outres,eppl,all,
outres,epth,all,
outres,cont,all,
outres,nldat,all,
stabilize,off                   ! Stabilization turned OFF by user
! *********** WB SOLVE COMMAND ***********
! check interactive state
*get,ANSINTER_,active,,int
*if,ANSINTER_,ne,0,then
/eof
*endif
solve
/com *************** Write FE CONNECTORS *********
CEWRITE,file,ce,,INTE
/com,****************************************************
/com,*************** FINISHED SOLVE FOR LS 1 *************
/post1
fini
