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/batch
! ANSYS input file written by Workbench version 2020 R2
! File used for geometry attach: C:\ARM_Reports\MECH_TECHDEMO_040\TBtemp\td40_1.agdb
/title,unsaved_project--Static Structural (A5)
/com,--- Data in consistent NMM units. See Solving Units in the help system for more information.
/units,MPA
/prep7
! Turn off shape checking because checks already performed inside WB mesher.
! See help system for more information.
SHPP,OFF,,NOWARN
etcon,set             ! allow ANSYS to choose best KEYOP's for 180x elements
/com,*********** Nodes for the whole assembly ***********
nblock,3,,163
(1i9,3e20.9e3)
        1     1.200000000E+01     0.000000000E+00     0.000000000E+00
        2     1.200000000E+01    -2.572310000E-06     2.400000000E+01
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-1
/com,*********** Elements for Body 1 "Line Body 1" ***********
et,1,188
keyo,1,3,2
eblock,19,solid,,74
(19i9)
        1        1        1        1        0        0        0        0        3        0        1        1        3       76
        1        1        1        1        0        0        0        0        3        0        2        3        4       77
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-1
/com,*********** Send User Defined Coordinate System(s) ***********
csys,0
toffst,273.15,  ! Temperature offset from absolute zero
/com,*********** Set Reference Temperature ***********
tref,22.
/com,*********** Send Materials ***********
Temperature = 'TEMP' ! Temperature
MP,EX,1,51700,	! tonne s^-2 mm^-1
MP,NUXY,1,0.3,

TB,SMA,1,1,,MEFF
TBTEMP,-23.15
TBDATA,1,1000,-23.15,140,5.6,0.1,51700
TBDATA,7,0

/com,*********** Send Beam Properties ***********
SECTYPE,1,BEAM,CSOL
SECDATA,2.
secoffset,cent

!************************* Model Summary ********************
!Line Body 1,	MAT1 (Setup2, File1),	matid,	1
!************************* End Model Summary ********************
CMBLOCK,N_FORCE ,NODE,        1
(8i10)
         2
CMBLOCK,NFXD    ,NODE,        1
(8i10)
         1
CMBLOCK,NDISP   ,NODE,       74
(8i10)
         1         3         4         5         6         7         8         9
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/com,*********** Create Direct FE , Displacements ****
CMBLOCK,_CM37U  ,NODE,        1
(8i10)
         1
CMBLOCK,_CM39U  ,NODE,       74
(8i10)
         1         3         4         5         6         7         8         9
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/com,*********** Define Body Force Temperature ***********
esel,none
esel,a,type,,1
cm,_CM43,elem
esel,all
*DIM,_loadvari43,TABLE,4,1,1,TIME,
! Time values
_loadvari43(1,0,1) = 0.
_loadvari43(2,0,1) = 1.
_loadvari43(3,0,1) = 2.
_loadvari43(4,0,1) = 3.
! Load values
_loadvari43(1,1,1) = -23.15
_loadvari43(2,1,1) = -23.15
_loadvari43(3,1,1) = 126.85
_loadvari43(4,1,1) = -23.15

/com,*********** Create Direct FE , Forces ****
CMBLOCK,_CM41F  ,NODE,        1
(8i10)
         2
fini
/com,****************************************************************************
/com,*************************    SOLUTION       ********************************
/com,****************************************************************************
/solu
antype,0                   ! static analysis
nlgeom,on                  ! Turn on Large Deformation Effects
_thickRatio=  0     ! Ratio of thick parts in the model
eqsl,sparse,,,,,1
nropt,unsym                ! Use full Newton-Raphson with unsymmetric matrices
cntr,print,1               ! print out contact info and also make no initial contact an error
dmpoption,emat,no             ! Don't combine emat file for DANSYS
dmpoption,esav,no             ! Don't combine esav file for DANSYS
nldiag,cont,iter           ! print out contact info each equilibrium iteration
rescontrol,define,last,last,,dele	   ! Program Controlled
/com,****************************************************
/com,******************* SOLVE FOR LS 1 OF 3 ****************
/com,**** Set Direct FE , Displacements ****
d,_CM37U,ux,0.
d,_CM37U,uy,0.
d,_CM37U,uz,0.
d,_CM39U,ux,0.
d,_CM39U,uy,0.
/com,**** Set Direct FE , Forces ****
f,_CM41F,fx,0.
f,_CM41F,fy,0.
f,_CM41F,fz,1830.
cmsel,s,_CM43
nsle
bf,all,temp,%_loadvari43%
nsel,all
esel,all
autots,on                   ! User turned on automatic time stepping
nsub,150,5000,50,OFF
time,1.
outres,erase
outres,all,none
outres,nsol,all,
outres,rsol,all
outres,eangl,all
outres,etmp,all
outres,veng,all
outres,strs,all,
outres,epel,all,
outres,eppl,all,
outres,epth,all,
outres,cont,all,
esel,s,type,,1
cm,_elmisc,elem
esel,all
outres,misc,all,_elmisc
! *********** WB SOLVE COMMAND ***********
! check interactive state
*get,ANSINTER_,active,,int
*if,ANSINTER_,ne,0,then
/eof
*endif
solve
/com *************** Write FE CONNECTORS *********
CEWRITE,file,ce,,INTE
/com,****************************************************
/com,*************** FINISHED SOLVE FOR LS 1 *************
/com,****************************************************
/com,******************* SOLVE FOR LS 2 OF 3 ****************
/com,**** Set Direct FE , Displacements ****
/com,**** Set Direct FE , Forces ****
autots,on                  ! Workbench Program Controlled automatic time stepping
nsub,5,1000,1              ! due to presence of nonlinear materials
time,2.
outres,erase
outres,all,none
outres,nsol,all,
outres,rsol,all
outres,eangl,all
outres,etmp,all
outres,veng,all
outres,strs,all,
outres,epel,all,
outres,eppl,all,
outres,epth,all,
outres,cont,all,
outres,misc,all,_elmisc
solve
/com,****************************************************
/com,*************** FINISHED SOLVE FOR LS 2 *************
/com,****************************************************
/com,******************* SOLVE FOR LS 3 OF 3 ****************
/com,**** Set Direct FE , Displacements ****
/com,**** Set Direct FE , Forces ****
autots,on                  ! Workbench Program Controlled automatic time stepping
nsub,5,1000,1              ! due to presence of nonlinear materials
time,3.
outres,erase
outres,all,none
outres,nsol,all,
outres,rsol,all
outres,eangl,all
outres,etmp,all
outres,veng,all
outres,strs,all,
outres,epel,all,
outres,eppl,all,
outres,epth,all,
outres,cont,all,
outres,misc,all,_elmisc
solve
/com,****************************************************
/com,*************** FINISHED SOLVE FOR LS 3 *************
/post1
fini
